# Calcul temps une instruction  (2 fois temps oscillateur) :
f_osc := 8 MHz
1/f_osc = 125 ns
f_cy := f_osc/2 = 4 MHz
T_cy := 1/f_cy = 250 ns
# I2C Baud Rate
f_SCL := 100 kHz
delay := 110 ns
I2CxBRG := f_cy/f_SCL - f_cy/(10*10^6 Hz) - 1 = 38.6
I2C1BRG := 9
(1/(2*f_SCL) - delay)*100 MHz = 489
# (OK datasheet table 18-1 si fp = 100 MHz (DOOZE = 1))
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# Calcule "DIE_TEMP" :
tm_digital := 13412
die_temp := (tm_digital - 12010)/45.6 = 30.7456
# Calcule "R_NTC" :
tm_digital := 10895
r_ntc := 10*10^3*(tm_digital/(21845 - tm_digital)) = 9949.77
